// SBML level 2 version 4

model E2ICIpalbo()
  // E2ICIpalbo

  // Compartments:
  compartment cell = 1;

  // Species:
  substanceOnly species ER in cell = 0.002081298;  // substance in MWBUILTINPREFIX_micro_MWBUILTINUNIT_mole
  substanceOnly species E2ER in cell = 0.06830623;  // substance in MWBUILTINPREFIX_micro_MWBUILTINUNIT_mole
  substanceOnly species ICIER in cell = 0;  // substance in MWBUILTINPREFIX_micro_MWBUILTINUNIT_mole
  substanceOnly species cyclinD1 in cell = 0.1823352;  // substance in MWBUILTINPREFIX_micro_MWBUILTINUNIT_mole
  substanceOnly species cyclinD1p21 in cell = 0.2187464;  // substance in MWBUILTINPREFIX_micro_MWBUILTINUNIT_mole
  substanceOnly species cyclinD1palbo in cell = 0;  // substance in MWBUILTINPREFIX_micro_MWBUILTINUNIT_mole
  substanceOnly species cMyc in cell = 6.534864;  // substance in MWBUILTINPREFIX_micro_MWBUILTINUNIT_mole
  substanceOnly species p21 in cell = 0.1020733;  // substance in MWBUILTINPREFIX_micro_MWBUILTINUNIT_mole
  substanceOnly species cyclinE in cell = 0.30603;  // substance in MWBUILTINPREFIX_micro_MWBUILTINUNIT_mole
  substanceOnly species cyclinEp21 in cell = 0.2736822;  // substance in MWBUILTINPREFIX_micro_MWBUILTINUNIT_mole
  substanceOnly species Rb in cell = 76.85735;  // substance in MWBUILTINPREFIX_micro_MWBUILTINUNIT_mole
  substanceOnly species pRb in cell = 0.4810486;  // substance in MWBUILTINPREFIX_micro_MWBUILTINUNIT_mole
  substanceOnly species ppRb in cell = 7.306315;  // substance in MWBUILTINPREFIX_micro_MWBUILTINUNIT_mole
  species cell_cell in cell = 1;
  substanceOnly species ERt in cell;  // substance in MWBUILTINPREFIX_micro_MWBUILTINUNIT_mole
  substanceOnly species cyclinD1t in cell;  // substance in MWBUILTINPREFIX_micro_MWBUILTINUNIT_mole
  substanceOnly species p21t in cell;  // substance in MWBUILTINPREFIX_micro_MWBUILTINUNIT_mole
  substanceOnly species Rbt in cell;  // substance in MWBUILTINPREFIX_micro_MWBUILTINUNIT_mole
  substanceOnly species cMyct in cell;  // substance in MWBUILTINPREFIX_micro_MWBUILTINUNIT_mole
  substanceOnly species ppRbt in cell;  // substance in MWBUILTINPREFIX_micro_MWBUILTINUNIT_mole

  // Parameters:
  k_ER = 0.0207 MWDERIVEDUNIT_micromole__hour;
  kd_ER = 0.1 MWDERIVEDUNIT_1__hour;
  kd_E2ER = 0.3 MWDERIVEDUNIT_1__hour;
  kb_E2ER = 4266.4776 MWDERIVEDUNIT_1__micromole_hour;
  kub_E2ER = 1 MWDERIVEDUNIT_1__hour;
  kb_ICIER = 206.8202 MWDERIVEDUNIT_1__micromole_hour;
  kub_ICIER = 1 MWDERIVEDUNIT_1__hour;
  kd_ICIER = 0.5184 MWDERIVEDUNIT_1__hour;
  k_cyclinD1 = 0.1375 MWDERIVEDUNIT_micromole__hour;
  kd_cyclinD1 = 1.73 MWDERIVEDUNIT_1__hour;
  k_cyclinD1E2ER = 11.5734;
  p_cyclinD1E2ER_1 = 2.6086 MWBUILTINPREFIX_micro_MWBUILTINUNIT_mole;
  p_cyclinD1E2ER_2 = 0.1704;
  kb_cyclinD1p21 = 32.0864 MWDERIVEDUNIT_1__micromole_hour;
  kub_cyclinD1p21 = 1 MWDERIVEDUNIT_1__hour;
  kb_cyclinD1palbo = 5.1776 MWDERIVEDUNIT_1__micromole_hour;
  kub_cyclinD1palbo = 1 MWDERIVEDUNIT_1__hour;
  k_cMyc = 0.33 MWDERIVEDUNIT_micromole__hour;
  kd_cMyc = 2.31 MWDERIVEDUNIT_1__hour;
  k_cMycE2ER = 14.1779;
  p_cMycE2ER_1 = 0.0282 MWBUILTINPREFIX_micro_MWBUILTINUNIT_mole;
  p_cMycE2ER_2 = 6.998;
  k_cMycppRb = 37.3017;
  p_cMycppRb_1 = 5.5045 MWBUILTINPREFIX_micro_MWBUILTINUNIT_mole;
  p_cMycppRb_2 = 5.3598;
  k_p21 = 1.2879 MWDERIVEDUNIT_micromole__hour;
  kd_p21 = 1.39 MWDERIVEDUNIT_1__hour;
  p_p21cMyc_1 = 9.2431 MWBUILTINPREFIX_micro_MWBUILTINUNIT_mole;
  p_p21cMyc_2 = 2.4352;
  k_cyclinE = 0.8058 MWDERIVEDUNIT_micromole__hour;
  kd_cyclinE = 1.39 MWDERIVEDUNIT_1__hour;
  kb_cyclinEp21 = 20.9396 MWDERIVEDUNIT_1__micromole_hour;
  kub_cyclinEp21 = 1 MWDERIVEDUNIT_1__hour;
  k_Rb = 3.267 MWDERIVEDUNIT_micromole__hour;
  kd_Rb = 0.35 MWDERIVEDUNIT_1__hour;
  k_RbppRb = 390.8695 MWDERIVEDUNIT_micromole__hour;
  p_RbppRb_1 = 10.7606 MWBUILTINPREFIX_micro_MWBUILTINUNIT_mole;
  p_RbppRb_2 = 7;
  k_RbcyclinD1 = 15.0134 MWDERIVEDUNIT_1__hour;
  k_pRbdepho = 23.6192 MWDERIVEDUNIT_micromole__hour;
  kd_pRb = 0.8 MWDERIVEDUNIT_1__hour;
  k_RbcyclinE = 5.3707 MWDERIVEDUNIT_1__hour;
  k_ppRbdepho = 9.2727 MWDERIVEDUNIT_micromole__hour;
  kd_ppRb = 0.05 MWDERIVEDUNIT_1__hour;
  p_cyclinD1Rb_1 = 14.0135 MWBUILTINPREFIX_micro_MWBUILTINUNIT_mole;
  p_cyclinD1Rb_2 = 3.1884;
  p_pRb_1 = 0.6772 MWBUILTINPREFIX_micro_MWBUILTINUNIT_mole;
  p_pRb_2 = 7;
  p_cyclinEpRb_1 = 6.3544 MWBUILTINPREFIX_micro_MWBUILTINUNIT_mole;
  p_cyclinEpRb_2 = 0.3503;
  p_ppRb_1 = 59.8461 MWBUILTINPREFIX_micro_MWBUILTINUNIT_mole;
  p_ppRb_2 = 2.11;
  k_pro = 0.0001196 MWDERIVEDUNIT_1__hour;
  k_proppRb = 266.3026;
  p_proppRb_1 = 6.0056 MWBUILTINPREFIX_micro_MWBUILTINUNIT_mole;
  p_proppRb_2 = 6;
  k_carrying = 37.3859;
  E2dep1 = 9.6676e-5 MWBUILTINPREFIX_micro_MWBUILTINUNIT_mole;
  E2dep2 = 2.3e-5 MWBUILTINPREFIX_micro_MWBUILTINUNIT_mole;
  E2 = 9.6676e-5 MWBUILTINPREFIX_micro_MWBUILTINUNIT_mole;
  ICI = 0.5 MWBUILTINPREFIX_micro_MWBUILTINUNIT_mole;
  palbo = 0 MWBUILTINPREFIX_micro_MWBUILTINUNIT_mole;
  ERt0 = 0.07038753 MWBUILTINPREFIX_micro_MWBUILTINUNIT_mole;
  cyclinD1t0 = 0.4010816 MWBUILTINPREFIX_micro_MWBUILTINUNIT_mole;
  p21t0 = 0.5945019 MWBUILTINPREFIX_micro_MWBUILTINUNIT_mole;
  Rbt0 = 84.64471 MWBUILTINPREFIX_micro_MWBUILTINUNIT_mole;
  cMyct0 = 6.534864 MWBUILTINPREFIX_micro_MWBUILTINUNIT_mole;
  ppRbt0 = 7.306315 MWBUILTINPREFIX_micro_MWBUILTINUNIT_mole;

  // Assignment rules:
  ERt := (ER + E2ER + ICIER)/ERt0;
  cyclinD1t := (cyclinD1 + cyclinD1p21 + cyclinD1palbo)/cyclinD1t0;
  p21t := (p21 + cyclinD1p21 + cyclinEp21)/p21t0;
  Rbt := (Rb + pRb + ppRb)/Rbt0;
  cMyct := cMyc/cMyct0;
  ppRbt := ppRb/ppRbt0;

  // Rate rules:
  ER' = k_ER - kd_ER*ER - kb_E2ER*E2*ER + kub_E2ER*E2ER - kb_ICIER*ICI*ER + kub_ICIER*ICIER;
  E2ER' = -kd_E2ER*E2ER + kb_E2ER*E2*ER - kub_E2ER*E2ER;
  ICIER' = kb_ICIER*ICI*ER - kub_ICIER*ICIER - kd_ICIER*ICIER;
  cyclinD1' = -kd_cyclinD1*cyclinD1 + k_cyclinD1*(1 + k_cyclinD1E2ER*E2ER^p_cyclinD1E2ER_2/(p_cyclinD1E2ER_1^p_cyclinD1E2ER_2 + E2ER^p_cyclinD1E2ER_2)) - kb_cyclinD1p21*cyclinD1*p21 + kub_cyclinD1p21*cyclinD1p21 - kb_cyclinD1palbo*cyclinD1*palbo + kub_cyclinD1palbo*cyclinD1palbo;
  cyclinD1p21' = -kd_cyclinD1*cyclinD1p21 + kb_cyclinD1p21*cyclinD1*p21 - kub_cyclinD1p21*cyclinD1p21;
  cyclinD1palbo' = -kd_cyclinD1*cyclinD1palbo + kb_cyclinD1palbo*cyclinD1*palbo - kub_cyclinD1palbo*cyclinD1palbo;
  cMyc' = -kd_cMyc*cMyc + k_cMyc*(1 + k_cMycE2ER*E2ER^p_cMycE2ER_2/(p_cMycE2ER_1^p_cMycE2ER_2 + E2ER^p_cMycE2ER_2) + k_cMycppRb*ppRb^p_cMycppRb_2/(p_cMycppRb_1^p_cMycppRb_2 + ppRb^p_cMycppRb_2));
  p21' = -kd_p21*p21 + k_p21*(p_p21cMyc_1^p_p21cMyc_2/(p_p21cMyc_1^p_p21cMyc_2 + cMyc^p_p21cMyc_2)) - kb_cyclinD1p21*cyclinD1*p21 + kub_cyclinD1p21*cyclinD1p21 - kb_cyclinEp21*cyclinE*p21 + kub_cyclinEp21*cyclinEp21;
  cyclinE' = k_cyclinE - kd_cyclinE*cyclinE - kb_cyclinEp21*cyclinE*p21 + kub_cyclinEp21*cyclinEp21;
  cyclinEp21' = -kd_cyclinE*cyclinEp21 + kb_cyclinEp21*cyclinE*p21 - kub_cyclinEp21*cyclinEp21;
  Rb' = -kd_Rb*Rb + k_Rb + k_RbppRb*ppRb^p_RbppRb_2/(p_RbppRb_1^p_RbppRb_2 + ppRb^p_RbppRb_2) - k_RbcyclinD1*cyclinD1*Rb^p_cyclinD1Rb_2/(p_cyclinD1Rb_1^p_cyclinD1Rb_2 + Rb^p_cyclinD1Rb_2) + k_pRbdepho*pRb^p_pRb_2/(p_pRb_1^p_pRb_2 + pRb^p_pRb_2);
  pRb' = -kd_pRb*pRb + k_RbcyclinD1*cyclinD1*Rb^p_cyclinD1Rb_2/(p_cyclinD1Rb_1^p_cyclinD1Rb_2 + Rb^p_cyclinD1Rb_2) - k_pRbdepho*pRb^p_pRb_2/(p_pRb_1^p_pRb_2 + pRb^p_pRb_2) - k_RbcyclinE*cyclinE*pRb^p_cyclinEpRb_2/(p_cyclinEpRb_1^p_cyclinEpRb_2 + pRb^p_cyclinEpRb_2) + k_ppRbdepho*ppRb^p_ppRb_2/(p_ppRb_1^p_ppRb_2 + ppRb^p_ppRb_2);
  ppRb' = -kd_ppRb*ppRb + k_RbcyclinE*cyclinE*pRb^p_cyclinEpRb_2/(p_cyclinEpRb_1^p_cyclinEpRb_2 + pRb^p_cyclinEpRb_2) - k_ppRbdepho*ppRb^p_ppRb_2/(p_ppRb_1^p_ppRb_2 + ppRb^p_ppRb_2);
  cell_cell' = k_pro*(1 + k_proppRb*ppRb^p_proppRb_2/(p_proppRb_1^p_proppRb_2 + ppRb^p_proppRb_2))*cell_cell*(1 - cell_cell/k_carrying);

  // Events:
  event_90: at (time/24 >= 3): E2 = E2dep2;

  // Unit definitions:
  unit MWBUILTINPREFIX_micro_MWBUILTINUNIT_mole = 1e-6 mole; MWBUILTINPREFIX_micro_MWBUILTINUNIT_mole is "micromole";
  unit MWDERIVEDUNIT_micromole__hour = mole * 2.777778e-10 dimensionless / second; MWDERIVEDUNIT_micromole__hour is "micromole/hour";
  unit MWDERIVEDUNIT_1__hour = 2.777778e-4 dimensionless / second; MWDERIVEDUNIT_1__hour is "1/hour";
  unit MWDERIVEDUNIT_1__micromole_hour = 277.7778 dimensionless / (mole * second); MWDERIVEDUNIT_1__micromole_hour is "1/(micromole*hour)";
end
